def createScene(rootNode):

	from Sofa.Units.Definitions import s, m, mm, N, kg, kPa
	from Sofa.Units.UnitSystem import MechanicalUnitSystem

	scene_unit = MechanicalUnitSystem(s, mm, kg)

	rootNode.name = "RootNode"
	rootNode.dt = scene_unit(0.01, s)
	rootNode.gravity = [0, scene_unit(-9.81, N/kg), 0]

	rootNode.addObject("DefaultAnimationLoop", name="animation_loop", computeBoundingBox=False)

	rootNode.addObject("RequiredPlugin", pluginName=["Sofa.Component.StateContainer","Sofa.Component.Mass","Sofa.Component.MechanicalLoad",
												     "Sofa.Component.LinearSolver.Direct","Sofa.Component.ODESolver.Backward",
													 "Sofa.Component.IO.Mesh","Sofa.Component.Topology.Container.Dynamic",
													 "Sofa.Component.SolidMechanics.FEM.Elastic","Sofa.Component.Topology.Container.Constant",
													 "Sofa.Component.Visual","Sofa.Component.Mapping.Linear","Sofa.GL.Component.Rendering3D",
													 "Sofa.Component.Constraint.Projective","Sofa.Component.Engine.Select", "Sofa.GUI.Component"])

	rootNode.addObject("VisualStyle", name="visual_options", displayFlags="showForceFields showWireframe showBehaviorModels")

	rootNode.addObject("MeshVTKLoader", name="mesh_loader_coarse", filename="../PneuNets_remeshed.vtk")

	rootNode.addObject("AttachBodyButtonSetting", name="mouse_config", stiffness=1) # Define the stiffness of the spring used with the mouse (using CTRL)

	mechanicalModel = rootNode.addChild("Finger")

	mechanicalModel.addObject("EulerImplicitSolver", name="integration_scheme")
	mechanicalModel.addObject("SparseLDLSolver", name="linear_solver", template="CompressedRowSparseMatrixMat3x3d")

	mechanicalModel.addObject("MeshTopology", name="topology_container", src="@../mesh_loader_coarse" )

	mechanicalModel.addObject("MechanicalObject", template="Vec3", name="state_container", showObject=True)

	mechanicalModel.addObject("TetrahedronFEMForceField", name="elastic_material_law", template="Vec3", poissonRatio=0.3, youngModulus=scene_unit(800, kPa))
	mechanicalModel.addObject("MeshMatrixMass", name="mass", template="Vec3,Vec3", massDensity=scene_unit(1e3, kg/m**3))

	mechanicalModel.addObject("BoxROI", name="box_ROI", box=[-10, 0, -20, 0, 30, 20], drawBoxes=True, # Selecting indices within the box [min_x,min_y,min_z,max_x,max_y,max_z]
						      position=mechanicalModel.state_container.position.linkpath,
							  tetrahedra=mechanicalModel.topology_container.tetrahedra.linkpath)
	mechanicalModel.addObject("FixedProjectiveConstraint", name="fixed_boundary", indices=mechanicalModel.box_ROI.indices.linkpath) # Project constraint enforcing fixed DoFs

	visualModel = mechanicalModel.addChild("Visual")
	visualModel.addObject("MeshSTLLoader", name="mesh_loader_surface", filename="../PneuNets_remeshed.stl")
	visualModel.addObject("OglModel", name="visual_model", src=visualModel.mesh_loader_surface.linkpath, color=[0.7, 0.7, 0.7, 0.6])
	visualModel.addObject("BarycentricMapping", name="visual_mapping", input="@../state_container", output="@visual_model")
