def createScene(rootNode):

	from Sofa.Units.Definitions import s, m, mm, N, kg, kPa
	from Sofa.Units.UnitSystem import MechanicalUnitSystem

	scene_unit = MechanicalUnitSystem(s, mm, kg)

	rootNode.name = "RootNode"
	rootNode.dt = scene_unit(0.01, s)
	rootNode.gravity = [0, scene_unit(-9.81, N/kg), 0] # Defining gravity along -Y

	rootNode.addObject("DefaultAnimationLoop", name="animation_loop", computeBoundingBox=False)

	rootNode.addObject("RequiredPlugin", pluginName=["Sofa.Component.StateContainer","Sofa.Component.Mass","Sofa.Component.MechanicalLoad",
												     "Sofa.Component.LinearSolver.Direct","Sofa.Component.ODESolver.Backward",
													 "Sofa.Component.IO.Mesh","Sofa.Component.Topology.Container.Dynamic",
													 "Sofa.Component.SolidMechanics.FEM.Elastic","Sofa.Component.Topology.Container.Constant",
													 "Sofa.Component.Visual"])

	rootNode.addObject("VisualStyle", name="visual_options", displayFlags="showForceFields")

	rootNode.addObject("MeshVTKLoader", name="mesh_loader_coarse", filename="../PneuNets_remeshed.vtk") # Using a VTK file format, thus using MeshVTKLoader

	################################################
	# Mechanical representation of the finger object
	mechanicalModel = rootNode.addChild("Finger")

	mechanicalModel.addObject("EulerImplicitSolver", name="integration_scheme")
	mechanicalModel.addObject("SparseLDLSolver", name="linear_solver", template="CompressedRowSparseMatrixMat3x3d")

    # MeshTopology is a static topology container, i.e. it does not support topology changes (unlike TetrahedronSetTopologyContainer)
	mechanicalModel.addObject("MeshTopology", name="topology_container", src="@../mesh_loader_coarse" )

	mechanicalModel.addObject("MechanicalObject", template="Vec3", name="state_container", showObject=True) # Define the template as Vec3 for 3D deformable bodies

	mechanicalModel.addObject("TetrahedronFEMForceField", name="elastic_material_law", template="Vec3", poissonRatio=0.3, youngModulus=scene_unit(800, kPa)) # Define an elastic constitutive law
	mechanicalModel.addObject("MeshMatrixMass", name="mass", template="Vec3,Vec3", massDensity=scene_unit(1e3, kg/m**3)) # Use a mass integrated over the volume
	################################################
